<?xml version="1.0"?>
<!--
  File:     O320-bc2.xml
  Author:   Ron Jensen

  Inputs:
    name:           O320-B2C
    type:           piston
    power:          160.0 hp
    augmented?      no
    injected?       no
-->

<piston_engine name="IO320">
  <minmp unit="INHG">          10.8  </minmp>
  <maxmp unit="INHG">          27.89 </maxmp> <!-- Should give a impedance factor of 0.073 -->
  <man-press-lag>               0.1  </man-press-lag>
  <air-intake-impedance-factor> 0.073   </air-intake-impedance-factor>
  <displacement unit="IN3">   320.0  </displacement>
  <maxhp>                     160.0  </maxhp>
  <bsfc>                        0.4  </bsfc>
  <cycles>                      4.0  </cycles>
  <idlerpm>                   550.0  </idlerpm>
  <maxrpm>                   2652.0  </maxrpm> <!-- From Robinson R22 Manual -->
  <sparkfaildrop>               0.1 </sparkfaildrop>
  <starter-torque> 120 </starter-torque>
  <ram-air-factor> 0. </ram-air-factor>
</piston_engine>
